# OpenSim document version 40000
InverseKinematicsTool:
  time_range: 5 7
  output_motion_file: C:\Users\admin\Documents\OpenSim\opensim-core-4.3-2021-06-27-54b40380c\COMAK\models\lenhart2015_generic\Coord_Static.mot
  marker_file: 0003_aa_Standing.trc
  report_marker_locations: true
  IKTaskSet:
    IKMarkerTask r.should: apply=true weight=5
    IKMarkerTask l.should: apply=true weight=5
    IKMarkerTask c7: apply=true weight=5
    IKMarkerTask r.asis: apply=true weight=10
    IKMarkerTask l.asis: apply=true weight=10
    IKMarkerTask sacrum: apply=true weight=10
    IKMarkerTask r.bar1: apply=true weight=0
    IKMarkerTask r.knee1: apply=true weight=10
    IKMarkerTask r.kneem: apply=true weight=10
    IKMarkerTask r.bar2: apply=true weight=0
    IKMarkerTask r.mall: apply=true weight=10
    IKMarkerTask r.mallm: apply=true weight=10
    IKMarkerTask r.heel: apply=true weight=10
    IKMarkerTask r.met: apply=true weight=5
    IKMarkerTask l.bar1: apply=true weight=0
    IKMarkerTask l.knee1: apply=true weight=10
    IKMarkerTask l.kneem: apply=true weight=10
    IKMarkerTask l.bar2: apply=true weight=0
    IKMarkerTask l.mall: apply=true weight=10
    IKMarkerTask l.mallm: apply=true weight=10
    IKMarkerTask l.heel: apply=true weight=10
    IKMarkerTask l.met: apply=true weight=5
    IKCoordinateTask [values shared by the 11 below unless stated]: apply=true weight=100 value_type=default_value
        value=0
    IKCoordinateTask pf_flex_r
    IKCoordinateTask pf_rot_r
    IKCoordinateTask pf_tilt_r
    IKCoordinateTask pf_tx_r
    IKCoordinateTask pf_ty_r
    IKCoordinateTask pf_tz_r
    IKCoordinateTask knee_add_r
    IKCoordinateTask knee_rot_r
    IKCoordinateTask knee_tx_r
    IKCoordinateTask knee_ty_r
    IKCoordinateTask knee_tz_r
