# OpenSim document version 40000
MarkerSet:
  Marker r.should: torso (-0.00285694 0.363534 0.159862)
  Marker l.should: torso (0.002856938 0.3635342 -0.159862)
  Marker c7: torso (-0.1006909 0.407399 0)
  Marker r.asis: pelvis (0.02130163 0.00799972 0.143341)
  Marker l.asis: pelvis (0.0213016 -0.00799972 -0.143341)
  Marker sacrum: pelvis (-0.2014597 0.02484463 0)
  Marker r.bar1: femur_r (-0.005172306 -0.0263445 0.0834046)
  Marker r.knee1: femur_r (0 -0.3664452 0.05851182)
  Marker r.kneem: femur_r (0 -0.3685075 -0.0621872)
  Marker r.bar2: tibia_r (-0.02135919 -0.05171521 0.06413249)
  Marker r.mall: tibia_r (-0.018697 -0.392184 0.0496913)
  Marker r.mallm: tibia_r (0.0151489 -0.370756 -0.038551)
  Marker r.heel: calcn_r (-0.02 0.02 0)
  Marker r.met: calcn_r (0.167248 0.02 -0.001140714)
  Marker l.bar1: femur_l (0.002738105 -0.03670764 -0.08340465)
  Marker l.knee1: femur_l (0 -0.37 -0.055)
  Marker l.kneem: femur_l (0 -0.37 0.055)
  Marker l.bar2: tibia_l (-0.02775937 -0.05774771 -0.06170465)
  Marker l.mall: tibia_l (-0.01869698 -0.3921835 -0.04969125)
  Marker l.mallm: tibia_l (-0.01514888 -0.3707556 0.03855101)
  Marker l.heel: calcn_l (-0.02 0.02 0)
  Marker l.met: calcn_l (0.167248 0.02 -0.00114071)
