# OpenSim document version 40000
ScaleTool lenhart2015-scaled:
  mass: 75.7 [kg]
  height: 159
  age: -1
  GenericModelMaker:
    model_file: lenhart2015_itr.osim
    marker_set_file: markers.xml
  ModelScaler:
    apply: true
    scaling_order: measurements manualScale
    marker_file: 0003_aa_Standing.trc
    time_range: 5 7
    preserve_mass_distribution: true
    output_model_file: ModelScaled_API.osim
    MeasurementSet:
      Measurement pelvis: apply=true
        MarkerPair: markers=(r.asis l.asis)
        MarkerPair: markers=(r.asis r.knee1)
        MarkerPair: markers=(l.asis l.knee1)
        BodyScale pelvis: axes=(X Y Z)
      Measurement torso: apply=true
        MarkerPair: markers=(r.asis l.asis)
        MarkerPair: markers=(r.asis r.knee1)
        MarkerPair: markers=(l.asis l.knee1)
        BodyScale torso: axes=(X Y Z)
        BodyScale neckhead: axes=(X Y Z)
        BodyScale humerus_r: axes=(X Y Z)
        BodyScale ulna_r: axes=(X Y Z)
        BodyScale radius_r: axes=(X Y Z)
        BodyScale hand_r: axes=(X Y Z)
        BodyScale humerus_l: axes=(X Y Z)
        BodyScale ulna_l: axes=(X Y Z)
        BodyScale radius_l: axes=(X Y Z)
        BodyScale hand_l: axes=(X Y Z)
      Measurement rFemur: apply=true
        MarkerPair: markers=(r.asis r.kneem)
        MarkerPair: markers=(r.asis r.knee1)
        MarkerPair: markers=(r.knee1 r.mall)
        MarkerPair: markers=(r.knee1 r.heel)
        BodyScale femur_r: axes=(X Y Z)
        BodyScale femur_distal_r: axes=(X Y Z)
        BodyScale patella_r: axes=(X Y Z)
      Measurement rTibia: apply=true
        MarkerPair: markers=(r.asis r.kneem)
        MarkerPair: markers=(r.asis r.knee1)
        MarkerPair: markers=(r.knee1 r.mall)
        MarkerPair: markers=(r.knee1 r.heel)
        BodyScale tibia_proximal_r: axes=(X Y Z)
        BodyScale tibia_r: axes=(X Y Z)
      Measurement rFoot: apply=true
        MarkerPair: markers=(r.heel r.met)
        MarkerPair: markers=(r.mall r.met)
        BodyScale talus_r: axes=(X Y Z)
        BodyScale calcn_r: axes=(X Y Z)
        BodyScale toes_r: axes=(X Y Z)
      Measurement lFemur: apply=true
        MarkerPair: markers=(l.asis l.kneem)
        MarkerPair: markers=(l.asis l.knee1)
        MarkerPair: markers=(l.knee1 l.mall)
        MarkerPair: markers=(l.knee1 l.heel)
        BodyScale femur_l: axes=(X Y Z)
        BodyScale patella_l: axes=(X Y Z)
      Measurement lTibia: apply=true
        MarkerPair: markers=(l.asis l.kneem)
        MarkerPair: markers=(l.asis l.knee1)
        MarkerPair: markers=(l.knee1 l.mall)
        MarkerPair: markers=(l.knee1 l.heel)
        BodyScale tibia_l: axes=(X Y Z)
      Measurement lFoot: apply=true
        MarkerPair: markers=(l.heel l.met)
        MarkerPair: markers=(l.mall l.met)
        BodyScale talus_l: axes=(X Y Z)
        BodyScale calcn_l: axes=(X Y Z)
        BodyScale toes_l: axes=(X Y Z)
    ScaleSet:
      Scale [values shared by the 58 below unless stated]: scales=(0.963636 0.963636 0.963636)
      Scale: segment=pelvis apply=true
      Scale: segment=femur_r apply=true
      Scale: segment=femur_distal_r apply=true
      Scale: segment=patella_r apply=true
      Scale: segment=tibia_proximal_r apply=true
      Scale: segment=tibia_r apply=true
      Scale: segment=talus_r apply=true
      Scale: segment=calcn_r apply=true
      Scale: segment=toes_r apply=true
      Scale: segment=femur_l apply=true
      Scale: segment=patella_l apply=true
      Scale: segment=tibia_l apply=true
      Scale: segment=talus_l apply=true
      Scale: segment=calcn_l apply=true
      Scale: segment=toes_l apply=true
      Scale: segment=torso apply=true
      Scale: segment=neckhead apply=true
      Scale: segment=humerus_r apply=true
      Scale: segment=ulna_r apply=true
      Scale: segment=radius_r apply=true
      Scale: segment=hand_r apply=true
      Scale: segment=humerus_l apply=true
      Scale: segment=ulna_l apply=true
      Scale: segment=radius_l apply=true
      Scale: segment=hand_l apply=true
      Scale: segment=pelvis apply=false
      Scale: segment=femur_r apply=false
      Scale: segment=femur_distal_r apply=false
      Scale: segment=patella_r apply=false
      Scale: segment=tibia_proximal_r apply=false
      Scale: segment=tibia_r apply=false
      Scale: segment=talus_r apply=false
      Scale: segment=calcn_r apply=false
      Scale: segment=toes_r apply=false
      Scale: segment=femur_l apply=false
      Scale: segment=patella_l apply=false
      Scale: segment=tibia_l apply=false
      Scale: segment=talus_l apply=false
      Scale: segment=calcn_l apply=false
      Scale: segment=toes_l apply=false
      Scale: segment=torso apply=false
      Scale: segment=neckhead apply=false
      Scale: segment=humerus_r apply=false
      Scale: segment=ulna_r apply=false
      Scale: segment=radius_r apply=false
      Scale: segment=hand_r apply=false
      Scale: segment=humerus_l apply=false
      Scale: segment=ulna_l apply=false
      Scale: segment=radius_l apply=false
      Scale: segment=hand_l apply=false
      Scale: segment=pelvis apply=true
      Scale: segment=femur_r apply=true
      Scale: segment=tibia_proximal_r apply=true
      Scale: segment=talus_r apply=true
      Scale: segment=femur_l apply=true
      Scale: segment=tibia_l apply=true
      Scale: segment=talus_l apply=true
      Scale: segment=torso apply=true
  MarkerPlacer:
    apply: false
    marker_file: 0003_aa_Standing.trc
    time_range: 5 7
    max_marker_movement: -1
    IKTaskSet:
      IKMarkerTask r.should: apply=true weight=5
      IKMarkerTask l.should: apply=true weight=5
      IKMarkerTask c7: apply=true weight=5
      IKMarkerTask r.asis: apply=true weight=10
      IKMarkerTask l.asis: apply=true weight=10
      IKMarkerTask sacrum: apply=true weight=10
      IKMarkerTask r.bar1: apply=true weight=0
      IKMarkerTask r.knee1: apply=true weight=10
      IKMarkerTask r.kneem: apply=true weight=10
      IKMarkerTask r.bar2: apply=true weight=0
      IKMarkerTask r.mall: apply=true weight=10
      IKMarkerTask r.mallm: apply=true weight=10
      IKMarkerTask r.heel: apply=true weight=10
      IKMarkerTask r.met: apply=true weight=5
      IKMarkerTask l.bar1: apply=true weight=0
      IKMarkerTask l.knee1: apply=true weight=10
      IKMarkerTask l.kneem: apply=true weight=10
      IKMarkerTask l.bar2: apply=true weight=0
      IKMarkerTask l.mall: apply=true weight=10
      IKMarkerTask l.mallm: apply=true weight=10
      IKMarkerTask l.heel: apply=true weight=10
      IKMarkerTask l.met: apply=true weight=5
      IKCoordinateTask [values shared by the 11 below unless stated]: apply=true weight=100 value_type=default_value
          value=0
      IKCoordinateTask pf_flex_r
      IKCoordinateTask pf_rot_r
      IKCoordinateTask pf_tilt_r
      IKCoordinateTask pf_tx_r
      IKCoordinateTask pf_ty_r
      IKCoordinateTask pf_tz_r
      IKCoordinateTask knee_add_r
      IKCoordinateTask knee_rot_r
      IKCoordinateTask knee_tx_r
      IKCoordinateTask knee_ty_r
      IKCoordinateTask knee_tz_r
